// SBML level 2 version 4

model TazOmpR()
  // TazOmpR

  // Compartments:
  compartment Two_Component_System_with_a_Sink = 1;

  // Species:
  substanceOnly species Taz in Two_Component_System_with_a_Sink = 100;  // substance in MWBUILTINUNIT_molecule
  substanceOnly species TazP in Two_Component_System_with_a_Sink = 0;  // substance in MWBUILTINUNIT_molecule
  substanceOnly species OmpR in Two_Component_System_with_a_Sink = 3500;  // substance in MWBUILTINUNIT_molecule
  substanceOnly species OmpRp in Two_Component_System_with_a_Sink = 0;  // substance in MWBUILTINUNIT_molecule
  substanceOnly species TetR in Two_Component_System_with_a_Sink = 0;  // substance in MWBUILTINUNIT_molecule

  // Reactions:
  Phosphorilation_of_OmpR: TazP + OmpR => Taz + OmpRp; kt*TazP*OmpR;
    kt = 4.1589;
  Dephosphorylation_of_OmpR: Taz + OmpRp => Taz + OmpR; k2*Taz*OmpRp;
    k2 = 0.0831;
  autophosphorylation_of_Taz: Taz => TazP; k_a*Taz;
    k_a = 1 MWDERIVEDUNIT_1__minute;
  Taz_Production: => Taz; beta_taz;
    beta_taz = 1 MWDERIVEDUNIT_molecule__minute;
  OmpR_production: => OmpR; beta_ompr;
    beta_ompr = 1 MWDERIVEDUNIT_molecule__minute;
  Taz_degrdatation: Taz => ; Taz_degrdatation_delta_p*Taz;
    Taz_degrdatation_delta_p = 1 MWDERIVEDUNIT_1__minute;
  TazP_degradation: TazP => ; TazP_degradation_delta_p*TazP;
    TazP_degradation_delta_p = 1 MWDERIVEDUNIT_1__minute;
  OmpR_degradation: OmpR => ; OmpR_degradation_delta_p*OmpR;
    OmpR_degradation_delta_p = 1 MWDERIVEDUNIT_1__minute;
  OmpRP_degradation: OmpRp => ; OmpRP_degradation_delta_p*OmpRp;
    OmpRP_degradation_delta_p = 1 MWDERIVEDUNIT_1__minute;
  OmpRc_Production: => TetR; beta_omprc;
    beta_omprc = 1 MWDERIVEDUNIT_molecule__minute;
  OmpRc_degradation: TetR => ; OmpRc_degradation_delta_p*TetR;
    OmpRc_degradation_delta_p = 1 MWDERIVEDUNIT_1__minute;

  // Unit definitions:
  unit MWBUILTINUNIT_molecule = 1.660539e-24 mole;
  unit 1/(molecule * minute) = 1.00369e22 dimensionless / (mole * second);
  unit MWDERIVEDUNIT_1__minute = 0.01666667 dimensionless / second; MWDERIVEDUNIT_1__minute is "1/minute";
  unit MWDERIVEDUNIT_molecule__minute = mole * 2.767565e-26 dimensionless / second; MWDERIVEDUNIT_molecule__minute is "molecule/minute";
end
