// SBML level 2 version 4

model TazOmpR()
  // TazOmpR

  // Compartments:
  compartment Two_Component_System_with_a_Sink = 1;

  // Species:
  substanceOnly species TAZ in Two_Component_System_with_a_Sink = 100; TAZ is "Taz";  // substance in MWBUILTINUNIT_molecule
  substanceOnly species TAZp in Two_Component_System_with_a_Sink = 0; TAZp is "TazP";  // substance in MWBUILTINUNIT_molecule
  substanceOnly species OMPR in Two_Component_System_with_a_Sink = 3500; OMPR is "OmpR";  // substance in MWBUILTINUNIT_molecule
  substanceOnly species OMPRp in Two_Component_System_with_a_Sink = 0; OMPRp is "OmpRp";  // substance in MWBUILTINUNIT_molecule
  substanceOnly species TETR in Two_Component_System_with_a_Sink = 0; TETR is "TetR";  // substance in MWBUILTINUNIT_molecule

  // Parameters:
  kp = 0.0831;
  kt = 4.1589;
  ka = 1 MWDERIVEDUNIT_1__minute; ka is "k_a";
  k1 = 1 dimensionless;
  vm_11 = 1 MWDERIVEDUNIT_molecule__minute;
  hill_ptet = 2 dimensionless; hill_ptet is "n";
  k2 = 1 MWDERIVEDUNIT_1__molecule;
  beta_ompr = 1 MWDERIVEDUNIT_molecule__minute;
  prot_deg = 1 MWDERIVEDUNIT_1__minute; prot_deg is "delta_p";
  beta_omprc = 1 MWDERIVEDUNIT_molecule__minute;
  vm_17 = 1 MWDERIVEDUNIT_molecule__minute;
  hill_pompc = 1 dimensionless; hill_pompc is "n";
  kd = 1 MWBUILTINUNIT_molecule;

  // Reactions:
  Phosphorilation_of_OmpR: TAZp + OMPR => TAZ + OMPRp; kt*TAZp*OMPR;
  Dephosphorylation_of_OmpR: TAZ + OMPRp => TAZ + OMPR; kp*TAZ*OMPRp;
  autophosphorylation_of_Taz: TAZ => TAZp; ka*TAZ;
  Taz_Production: => TAZ; vm_11/(k1 + (1 + k2*TETR)^hill_ptet);
  OmpR_production: => OMPR; beta_ompr;
  Taz_degrdatation: TAZ => ; prot_deg*TAZ;
  TazP_degradation: TAZp => ; prot_deg*TAZp;
  OmpR_degradation: OMPR => ; prot_deg*OMPR;
  OmpRP_degradation: OMPRp => ; prot_deg*OMPRp;
  TetR_Production: => TETR; vm_17*OMPRp^hill_pompc/(kd^hill_pompc + OMPRp^hill_pompc);
  TetR_degradation: TETR => ; prot_deg*TETR;

  // Unit definitions:
  unit MWBUILTINUNIT_molecule = 1.660539e-24 mole;
  unit 1/(molecule * minute) = 1.00369e22 dimensionless / (mole * second);
  unit MWDERIVEDUNIT_1__minute = 0.01666667 dimensionless / second; MWDERIVEDUNIT_1__minute is "1/minute";
  unit MWDERIVEDUNIT_molecule__minute = mole * 2.767565e-26 dimensionless / second; MWDERIVEDUNIT_molecule__minute is "molecule/minute";
  unit MWDERIVEDUNIT_1__molecule = 6.022142e23 dimensionless / mole; MWDERIVEDUNIT_1__molecule is "1/molecule";
end
