// SBML level 2 version 4

model TazOmpR()
  // TazOmpR

  // Compartments:
  compartment Two_Component_System_with_a_Sink = 1;

  // Species:
  substanceOnly species Taz in Two_Component_System_with_a_Sink = 100;  // substance in MWBUILTINUNIT_molecule
  substanceOnly species TazP in Two_Component_System_with_a_Sink = 0;  // substance in MWBUILTINUNIT_molecule
  substanceOnly species OmpR in Two_Component_System_with_a_Sink = 3500;  // substance in MWBUILTINUNIT_molecule
  substanceOnly species OmpRP in Two_Component_System_with_a_Sink = 0; OmpRP is "OmpRp";  // substance in MWBUILTINUNIT_molecule
  substanceOnly species OmpRc in Two_Component_System_with_a_Sink = 0;  // substance in MWBUILTINUNIT_molecule
  substanceOnly species OmpRcP in Two_Component_System_with_a_Sink = 0;  // substance in MWBUILTINUNIT_molecule

  // Parameters:
  k_t = 4.1589; k_t is "kt";
  k_p = 0.0831; k_p is "kp";
  k_a = 1 MWDERIVEDUNIT_1__minute;
  beta_taz = 1 MWDERIVEDUNIT_molecule__minute;
  beta_ompr = 1 MWDERIVEDUNIT_molecule__minute;
  beta_omprc = 1 MWDERIVEDUNIT_molecule__minute;
  delta_p = 1 MWDERIVEDUNIT_1__minute;

  // Reactions:
  Phosphorilation_of_OmpR: TazP + OmpR => Taz + OmpRP; k_t*TazP*OmpR;
  Dephosphorylation_of_OmpR: Taz + OmpRP => Taz + OmpR; k_p*Taz*OmpRP;
  autophosphorylation_of_Taz: Taz => TazP; k_a*Taz;
  Phosphorylation_of_OmpRc: OmpRc + TazP => Taz + OmpRcP; k_t*OmpRc*TazP;
  Dephosphorylation_of_OmpRc: Taz + OmpRcP => Taz + OmpRc; k_p*Taz*OmpRcP;
  Taz_Production: => Taz; beta_taz;
  OmpR_production: => OmpR; beta_ompr;
  Taz_degrdatation: Taz => ; delta_p*Taz;
  TazP_degradation: TazP => ; delta_p*TazP;
  OmpR_degradation: OmpR => ; delta_p*OmpR;
  OmpRP_degradation: OmpRP => ; delta_p*OmpRP;
  OmpRc_Production: => OmpRc; beta_omprc;
  OmpRc_degradation: OmpRc => ; delta_p*OmpRc;
  OmpRcP_degradation: OmpRcP => ; delta_p*OmpRcP;

  // Unit definitions:
  unit MWBUILTINUNIT_molecule = 1.660539e-24 mole;
  unit 1/(molecule * minute) = 1.00369e22 dimensionless / (mole * second);
  unit MWDERIVEDUNIT_1__minute = 0.01666667 dimensionless / second; MWDERIVEDUNIT_1__minute is "1/minute";
  unit MWDERIVEDUNIT_molecule__minute = mole * 2.767565e-26 dimensionless / second; MWDERIVEDUNIT_molecule__minute is "molecule/minute";
end
