// SBML level 2 version 4

model TazOmpR()
  // TazOmpR

  // Compartments:
  compartment Two_Component_System_with_a_Sink = 1;

  // Species:
  substanceOnly species TAZ in Two_Component_System_with_a_Sink = 100; TAZ is "Taz";  // substance in MWBUILTINUNIT_molecule
  substanceOnly species TAZp in Two_Component_System_with_a_Sink = 0; TAZp is "TazP";  // substance in MWBUILTINUNIT_molecule
  substanceOnly species OMPR in Two_Component_System_with_a_Sink = 3500; OMPR is "OmpR";  // substance in MWBUILTINUNIT_molecule
  substanceOnly species OMPRp in Two_Component_System_with_a_Sink = 0; OMPRp is "OmpRp";  // substance in MWBUILTINUNIT_molecule
  substanceOnly species OMPRc in Two_Component_System_with_a_Sink = 0; OMPRc is "OmpRc";  // substance in MWBUILTINUNIT_molecule
  substanceOnly species OMPRcp in Two_Component_System_with_a_Sink = 0; OMPRcp is "OmpRcP";  // substance in MWBUILTINUNIT_molecule

  // Parameters:
  kt = 4.1589;
  kp = 0.0831;
  ka = 1 MWDERIVEDUNIT_1__minute;
  beta_taz = 1 MWDERIVEDUNIT_molecule__minute;
  beta_ompr = 1 MWDERIVEDUNIT_molecule__minute;
  prot_det = 1 MWDERIVEDUNIT_1__minute; prot_det is "delta_p";
  vm = 1 MWDERIVEDUNIT_molecule__minute;
  n = 6 dimensionless;
  Kd = 1 MWBUILTINUNIT_molecule; Kd is "kd";

  // Reactions:
  Phosphorilation_of_OmpR: TAZp + OMPR => TAZ + OMPRp; kt*TAZp*OMPR;
  Dephosphorylation_of_OmpR: TAZ + OMPRp => TAZ + OMPR; kp*TAZ*OMPRp;
  autophosphorylation_of_Taz: TAZ => TAZp; ka*TAZ;
  Phosphorylation_of_OmpRc: OMPRc + TAZp => TAZ + OMPRcp; kt*OMPRc*TAZp;
  Dephosphorylation_of_OmpRc: TAZ + OMPRcp => TAZ + OMPRc; kp*TAZ*OMPRcp;
  Taz_Production: => TAZ; beta_taz;
  OmpR_production: => OMPR; beta_ompr;
  Taz_degrdatation: TAZ => ; prot_det*TAZ;
  TazP_degradation: TAZp => ; prot_det*TAZp;
  OmpR_degradation: OMPR => ; prot_det*OMPR;
  OmpRP_degradation: OMPRp => ; prot_det*OMPRp;
  OmpRc_Production: => OMPRc; vm*OMPRp^n/(Kd^n + OMPRp^n);
  OmpRc_degradation: OMPRc => ; prot_det*OMPRc;
  OmpRcP_degradation: OMPRcp => ; mw19e0a035_1be9_4d02_9943_54416d0e63da*OMPRcp;

  // Unit definitions:
  unit MWBUILTINUNIT_molecule = 1.660539e-24 mole;
  unit 1/(molecule * minute) = 1.00369e22 dimensionless / (mole * second);
  unit MWDERIVEDUNIT_1__minute = 0.01666667 dimensionless / second; MWDERIVEDUNIT_1__minute is "1/minute";
  unit MWDERIVEDUNIT_molecule__minute = mole * 2.767565e-26 dimensionless / second; MWDERIVEDUNIT_molecule__minute is "molecule/minute";
end
