// SBML level 2 version 4

model TazOmpR()
  // TazOmpR

  // Compartments:
  compartment Two_Component_System_with_a_Sink = 1;

  // Species:
  substanceOnly species Taz in Two_Component_System_with_a_Sink = 100;  // substance in MWBUILTINUNIT_molecule
  substanceOnly species TazP in Two_Component_System_with_a_Sink = 0;  // substance in MWBUILTINUNIT_molecule
  substanceOnly species OmpR in Two_Component_System_with_a_Sink = 3500;  // substance in MWBUILTINUNIT_molecule
  substanceOnly species OmpRp in Two_Component_System_with_a_Sink = 0;  // substance in MWBUILTINUNIT_molecule
  substanceOnly species Tazc in Two_Component_System_with_a_Sink = 0;  // substance in MWBUILTINUNIT_molecule
  substanceOnly species GFP in Two_Component_System_with_a_Sink = 0;  // substance in MWBUILTINUNIT_molecule

  // Parameters:
  beta_gfp = 1 MWDERIVEDUNIT_molecule__minute;
  hill_coeff = 1 dimensionless; hill_coeff is "n";
  Kd = 1 MWBUILTINUNIT_molecule;
  kt = 4.1589;
  kp = 0.0831;
  kpc = 1;
  beta_ompr = 1 MWDERIVEDUNIT_molecule__minute;
  beta_taz = 1 MWDERIVEDUNIT_molecule__minute;
  delta_p = 1 MWDERIVEDUNIT_1__minute;
  beta_tazc = 1 MWDERIVEDUNIT_molecule__minute;
  ka = 1 MWDERIVEDUNIT_1__minute; ka is "k_a";

  // Reactions:
  Phosphorilation_of_OmpR: TazP + OmpR => Taz + OmpRp; kt*TazP*OmpR;
  Dephosphorylation_of_OmpR: Taz + OmpRp => Taz + OmpR; kp*Taz*OmpRp;
  autophosphorylation_of_Taz: Taz => TazP; ka*Taz;
  Dephosphorylation_of_OmpR_by_Tazc: Tazc + OmpRp => Tazc + OmpR; kpc*Tazc*OmpRp;
  Taz_Production: => Taz; beta_taz;
  OmpR_production: => OmpR; beta_ompr;
  Taz_degrdatation: Taz => ; delta_p*Taz;
  TazP_degradation: TazP => ; delta_p*TazP;
  OmpR_degradation: OmpR => ; delta_p*OmpR;
  OmpRP_degradation: OmpRp => ; delta_p*OmpRp;
  Tazc_Production: => Tazc; beta_tazc*OmpRp^hill_coeff/(Kd^hill_coeff + OmpRp^hill_coeff);
  Tazc_degradation: Tazc => ; delta_p*Tazc;
  GFP_production: => GFP; beta_gfp*OmpRp^hill_coeff/(Kd^hill_coeff + OmpRp^hill_coeff);
  GFP_degradation: GFP => ; delta_p*GFP;

  // Unit definitions:
  unit MWBUILTINUNIT_molecule = 1.660539e-24 mole;
  unit 1/(molecule * minute) = 1.00369e22 dimensionless / (mole * second);
  unit MWDERIVEDUNIT_1__minute = 0.01666667 dimensionless / second; MWDERIVEDUNIT_1__minute is "1/minute";
  unit MWDERIVEDUNIT_molecule__minute = mole * 2.767565e-26 dimensionless / second; MWDERIVEDUNIT_molecule__minute is "molecule/minute";
end
